// COMSOL Multiphysics 6.1.0.282 model "main.mph"
// Outline of the model tree

Parameters
  lda0 = 400[nm]  // Wavelength of free space
  f0 = c_const/lda0  // Frequency
  L = 3[um]  // Height of the structure
  L0 = 1[um]  // width of the first element
  L1 = 0.4[um]  // width of the second element
  L2 = 0.368[um]  // width of the third element
  L3 = 0.262[um]  // width of the fourth element
  L4 = 0.11265[um]  // width of the fifth element
  nf = 5  // Refractive index of the last element
  n0 = 1  // Refractive index of the first element
  n1 = 1.0870  // Refractive index of the second element
  n2 = 1.5217  // Refractive index of the third element
  n3 = 2.5362  // Refractive index of the fourth element
  n4 = 3.5507  // Refractive index of the fifth element

Geometry
  geom1 "Geometry 1" (2D, length unit m)
    r1: Rectangle | size = {L0, L}
    r2: Rectangle | pos = {L0, 0}; size = {L1, L}
    r3: Rectangle | pos = {L0+L1, 0}; size = {L2, L}
    r4: Rectangle | pos = {L0+L1+L2, 0}; size = {L3, L}
    r5: Rectangle | pos = {L0+L1+L2+L3, 0}; size = {L4, L}
    r6: Rectangle | pos = {L0+L1+L2+L3+L4, 0}; size = {L0, L}
    fin: Finalize "Form Union"

Materials
  mat1: Common "Material 1" on domains 1
    RefractiveIndex
      n = n0
      ki = 0
  mat2: Common "Material 2" on domains 2
    RefractiveIndex
      n = n1
      ki = 0
  mat3: Common "Material 3" on domains 3
    RefractiveIndex
      n = n2
      ki = 0
  mat4: Common "Material 4" on domains 4
    RefractiveIndex
      n = n3
      ki = 0
  mat5: Common "Material 5" on domains 5
    RefractiveIndex
      n = n4
      ki = 0
  mat6: Common "Material 6" on domains 6
    RefractiveIndex
      n = nf
      ki = 0

Physics
  ewfd: ElectromagneticWavesFrequencyDomain on all domains
    dependent variable E = {Ex, Ey, Ez}
    MeshControl.ResolveWaveInLossyMedia = 0
    components.components = inplane
    BackgroundField.SolveFor = fullField
    BackgroundField.Eb = {0, 0, 1}
    PortSweepSettings.useSweep = 0
    wee1: WaveEquationElectric (default)
    pec1: PerfectElectricConductor (default)
    init1: init "Initial Values 1" (default) | E = {0, 0, 0}
    port1: Port on boundaries 1
      PortSlit = 0
      PortType = Periodic
      Eampl = {0, 1, 0}
      alpha_inc = 0
      IncludeInAutomaticDiffractionOrderCalculation = 0
    port2: Port on boundaries 19
      PortType = Periodic
      Eampl = {0, 1, 0}
      IncludeInAutomaticDiffractionOrderCalculation = 0

Mesh
  mesh1 "Mesh 1" (physics-controlled)
    size: MeshSizeDefault | hauto = 2

Studies
  std1 "Study 1"
    freq: Frequency "Frequency Domain" | punit = THz; plist = f0

Solver configurations
  sol1 "Solution 1" (study std1)
    v1: Variables "Dependent Variables 1"
    s1: Stationary "Stationary Solver 1" | stol = 0.01; linpmethod = sol
      p1: Parametric | pname = freq; plistarr = f0; punit = THz; pcontinuationmode = no
      fc1: FullyCoupled | linsolver = d1
      d1: Direct "Suggested Direct Solver (ewfd)"

Datasets
  dset1: Solution | solution = sol1

Derived values
  gev1: EvalGlobal "Reflectance, Transmittance, and Absorptance (ewfd)"
    data = dset1
    table = tbl1
    expr = {ewfd.Rorder_0, ewfd.Rtotal, ewfd.Torder_0, ewfd.Ttotal, ewfd.RTtotal, ewfd.Atotal}

Tables
  tbl1: Table
    freq (THz) | Reflectance, order 0 (1) | Total reflectance (1) | Transmittance, order 0 (1) | Total transmittance (1) | Total reflectance and transmittance (1) | Absorptance (1)
    749.481 | 0.23276 | 0.23276 | 0.76724 | 0.76724 | 1 | 7.66054e-15

Plots
  pg1: PlotGroup2D "Electric Field (ewfd)" | data = dset1
    surf1: Surface | expr = ewfd.Ey