// COMSOL Multiphysics 6.1.0.282 model "main.mph"
// Outline of the model tree

Parameters
  f0 = 10[GHz]  // Frequency
  lda0 = c_const/f0  // Wavelength
  phi = 0[deg]  // Angle of incidence
  r0 = lda0/4  // Inner Radius
  r1 = lda0  // Outer Radius
  thickness = 1[mm]  // Thickness of circle

Selections
  sel1: Explicit on boundaries adjacent to domains 6

Coordinate systems
  pml1: PML "Perfectly Matched Layer 1" on domains 1-4 | ScalingType = Cylindrical

Geometry
  geom1 "Geometry 1" (2D, length unit m)
    c1: Circle | layername = Layer 1; layer = thickness; r = r1
    c2: Circle | r = r0
    fin: Finalize "Form Union"

Materials
  mat1: Common "Air" on all domains
    def "Basic"
      thermalexpansioncoefficient = alpha_p(pA,T)
      molarmass = 0.02897[kg/mol]
      bulkviscosity = muB(T)
      relpermeability = 1
      relpermittivity = 1
      dynamicviscosity = eta(T)
      ratioofspecificheat = 1.4
      electricconductivity = 0[S/m]
      heatcapacity = Cp(T)
      density = rho(pA,T)
      thermalconductivity = k(T)
      soundspeed = cs(T)
      eta: Piecewise | arg = T; pieces = {200.0, 1600.0, -8.38278E-7+8.35717342E-8*T^1-7.69429583E-11*T^2+4.6437266E-14*T^3-1.06585607E-17*T^4}; argunit = K; fununit = Pa*s
      Cp: Piecewise | arg = T; pieces = {200.0, 1600.0, 1047.63657-0.372589265*T^1+9.45304214E-4*T^2-6.02409443E-7*T^3+1.2858961E-10*T^4}; argunit = K; fununit = J/(kg*K)
      rho: Analytic | expr = pA*0.02897/R_const[K*mol/J]/T; args = {pA, T}; fununit = kg/m^3; argunit = {Pa, K}
      k: Piecewise | arg = T; pieces = {200.0, 1600.0, -0.00227583562+1.15480022E-4*T^1-7.90252856E-8*T^2+4.11702505E-11*T^3-7.43864331E-15*T^4}; argunit = K; fununit = W/(m*K)
      cs: Analytic | expr = sqrt(1.4*R_const[K*mol/J]/0.02897*T); args = T; fununit = m/s; argunit = K
      an1: Analytic | funcname = alpha_p; expr = -1/rho(pA,T)*d(rho(pA,T),T); args = {pA, T}; fununit = 1/K; argunit = {Pa, K}
      an2: Analytic "Analytic 2a" | funcname = muB; expr = 0.6*eta(T); args = T; fununit = Pa*s; argunit = K
    RefractiveIndex
      n = 1
      ki = 0
    NonlinearModel
      BA = (def.gamma+1)/2
    idealGas
      Rs = R_const/Mn
      heatcapacity = Cp(T)
      ratioofspecificheat = 1.4
      molarmass = 0.02897
      Cp: Piecewise | arg = T; pieces = {200.0, 1600.0, 1047.63657-0.372589265*T^1+9.45304214E-4*T^2-6.02409443E-7*T^3+1.2858961E-10*T^4}; argunit = K; fununit = J/(kg*K)
  mat2: Common "Aluminum" on selection sel1
    def "Basic"
      relpermeability = 1
      heatcapacity = 900[J/(kg*K)]
      thermalconductivity = 238[W/(m*K)]
      electricconductivity = 3.774e7[S/m]
      relpermittivity = 1
      thermalexpansioncoefficient = 23e-6[1/K]
      density = 2700[kg/m^3]
    Enu "Young's modulus and Poisson's ratio"
      E = 70[GPa]
      nu = 0.33
    Murnaghan
      l = -250[GPa]
      m = -330[GPa]
      n = -350[GPa]

Physics
  emw: ElectromagneticWaves "Electromagnetic Waves, Frequency Domain" on domains 1-5
    dependent variable E = {Ex, Ey, Ez}
    components.components = outofplane
    BackgroundField.SolveFor = scatteredField
    BackgroundField.Eb = {0, 0, 1[V/m]*exp(-j*emw.k0*(x*cos(phi)+ y*sin(phi)))}
    PortSweepSettings.useSweep = 0
    wee1: WaveEquationElectric (default) | epsilonr_mat = PorousMedia; mur_mat = PorousMedia; sigma_mat = PorousMedia
    pec1: PerfectElectricConductor (default)
    init1: init "Initial Values 1" (default)
    imp1: Impedance "Impedance Boundary Condition 1" on selection sel1
    ffd1: FarFieldDomain on domains 5
      ffc1: FarFieldCalculation on boundaries 7, 8, 12, 15

Mesh
  mesh1 "Mesh 1"
    size: MeshSizeDefault | hmax = 0.37470; hmin = 0.0018000; hcurve = 0.3; hgrad = 1.3; custom = on
    dis1: Distribution on boundaries 1-4 | type = predefined; elemcount = 10
    ftri1: FreeTri "Free Triangular 1" on domains 5, 6 | smoothmaxiter = 4; smoothmaxdepth = 4
    map1: Map "Mapped 1" on domains 1-4 | adjustedgdistr = on; smoothmaxiter = 4; smoothmaxdepth = 4

Studies
  std1 "Study 1"
    freq: Frequency "Frequency Domain" | punit = GHz; plist = f0; useparam = on

Solver configurations
  sol1 "Solution 1" (study std1)
    v1: Variables "Dependent Variables 1"
    s1: Stationary "Stationary Solver 1" | stol = 0.01; linpmethod = sol
      p1: Parametric
        sweeptype = filled
        pname = {freq, phi}
        plistarr = {f0, range(0, 1, 360)}
        punit = {GHz, deg}
        pcontinuationmode = no
      fc1: FullyCoupled | linsolver = d1
      d1: Direct "Suggested Direct Solver (emw)" | linsolver = pardiso

Datasets
  dset1: Solution | solution = sol1

Plots
  pg1: PlotGroup2D "Electric Field (emw)" | data = dset1
    surf1: Surface | expr = emw.normE
  pg2: PolarGroup "2D Far Field (emw)" | data = dset1
    rp1: RadiationPattern | expr = emw.normEfar; phidisc = 180