// COMSOL Multiphysics 6.1.0.282 model "Q1.1.mph"
// Outline of the model tree

Parameters
  lda0 = 1.55[um]  // wavelength
  f0 = c_const/lda0  // frequency
  a = 9.1[um]  // core radius
  b = 10*a  // cladding radius
  c = 1.2*b  // jacket radius
  n1 = 1.45  // core refractive index
  n2 = n1*(1-delta)  // cladding refractive index
  delta = 6.89661*10^(-4)  // fractional refractive index
  PML = c-b  // PML boundary condition

Coordinate systems
  pml1: PML "Perfectly Matched Layer 1" on domains 1-4 | ScalingType = Cylindrical; directions = 2

Geometry
  geom1 "Geometry 1" (2D, length unit m)
    c1: Circle | r = a
    c2: Circle | layername = Layer 1; layer = PML; r = b
    fin: Finalize "Form Union"

Materials
  mat1: Common "Material 1" on domains 6
    RefractiveIndex
      n = n1
      ki = 0
  mat2: Common "Material 2" on domains 1-5
    RefractiveIndex
      n = n2
      ki = 0

Physics
  ewfd: ElectromagneticWavesFrequencyDomain on all domains
    dependent variable E = {Ex, Ey, Ez}
    wee1: WaveEquationElectric (default)
    pec1: PerfectElectricConductor (default)
    init1: init "Initial Values 1" (default)

Mesh
  mesh1 "Mesh 1"
    size: MeshSizeDefault | hmax = 1.22E-5; hmin = 5.46E-8; hcurve = 0.3; hgrad = 1.3
    ftri1: FreeTri "Free Triangular 1" on domains 6
      size1: Size on domains 6 | hauto = 2
    ftri2: FreeTri "Free Triangular 2" on remaining entities

Studies
  std1 "Study 1"
    mode: ModeAnalysis | modeFreq = f0; shift = n1; conrad = 1; uselinpsol = on; linpsolnum = auto; neigs = 6

Solver configurations
  sol1 "Solution 1" (study std1)
    v1: Variables "Dependent Variables 1"
    e1: Eigenvalue "Eigenvalue Solver 1" | shift = n1
      d1: Direct "Suggested Direct Solver (ewfd)"

Datasets
  dset1: Solution | solution = sol1

Plots
  pg1: PlotGroup2D "Electric Field (ewfd)" | data = dset1
    surf1: Surface | expr = ewfd.normE
    arws1: ArrowSurface | expr = {ewfd.Ex, ewfd.Ey}